// COMSOL Multiphysics 6.2.0.290 model "PN Junction 335 Lab3.mph"
// Lab3_PN Junction
// Outline of the model tree

Parameters
  Va = bias*sweep  // Applied voltage
  temp_var = 300[K]  // Lattice temperature
  Na = 8e15[1/cm^3]  // Acceptor concentration
  Nd = 2e18[1/cm^3]  // Donor concentration
  epsilonr_param = 11.8  // Relative permittivity
  Eg0_param = 1.12[V]  // Band gap
  chi0_param = 4.05[V]  // Electron affinity
  Ni = 1.25e10[1/cm^3]  // Intrinsic carrier concentration
  Nc_param = Ni*exp(Eg0_param*e_const/(2*k_B_const*temp_var))  // Conduction band density of states
  Nv_param = Ni*exp(Eg0_param*e_const/(2*k_B_const*temp_var))  // Valence band density of states
  taun_param = 1e-6[s]  // Electron lifetime
  taup_param = taun_param  // Hole lifetime
  bias = -4[V]  // Device bias
  sweep = 1  // Sweep parameter for gradually turning on bias
  mu_n = 1400[cm^2/(V*s)]
  mu_p = 450[cm^2/(V*s)]

Geometry
  geom1 "Geometry 1" (1D, length unit µm)
    i1: Interval | coord = {-2.5, 2.5}
    pt1: Point | p = -1
    fin: Finalize "Form Union"

Materials
  mat1: Common "Material 1" on all domains
    def "Basic"
      relpermittivity = epsilonr_param
    SemicondMaterial "Semiconductor material"
      Eg0 = Eg0_param
      chi0 = chi0_param
      Nv = Nv_param
      Nc = Nc_param
      mun = mu_n
      mup = mu_p
    SRH "Shockley–Read–Hall recombination"
      taun = taun_param
      taup = taup_param

Physics
  semi: Semiconductor on all domains
    dependent variable V
    ShapeProperty.Formulation = FEM1log
    smm1: SemiconductorMaterialModel (default)
      mun_mat = userdef
      mun = mu_n
      mup_mat = userdef
      mup = mu_p
      minput_temperature = temp_var
    ins1: Insulation (default)
    zc1: ZeroCharge (default)
    ii1: InsulatorInterface (default)
    cont1: Continuity "Continuity/Heterojunction 1" (default)
    init1: init "Initial Values 1" (default)
    tar1: TrapAssistedRecombination on domains 1, 2 | taup_mat = from_mat
    adm1: AnalyticDopingModel on domains 1 | impurityType = donor; NDc = Nd
    adm2: AnalyticDopingModel on domains 2 | NAc = Na
    mc1: MetalContact on boundaries 1
    mc2: MetalContact on boundaries 3 | V0 = Va

Mesh
  mesh1 "Mesh 1"
    size: MeshSizeDefault | hmax = 0.335; hmin = 0.0015; hcurve = 0.3; hgrad = 1.3
    edg1: Edge on remaining entities
      dis2: Distribution on all domains | numelem = 500

Studies
  std1 "Study 1 - Finite Element Log Formulation"
    stat: Stationary | useparam = on; sweeptype = filled; pname = {bias, sweep}; plistarr = {-4 0 0.5, 0 1}; punit = {V, }

Solver configurations
  sol1 "Solution 1" (study std1)
    v1: Variables "Dependent Variables 1"
      comp1_Ne: Field "Electron solution variable (comp1.Ne)" | scalemethod = manual; scaleval = 1
      comp1_Ph: Field "Hole solution variable (comp1.Ph)" | scalemethod = manual; scaleval = 1
      comp1_V: Field "Electric potential (comp1.V)" | scalemethod = manual; scaleval = 1
    s1: Stationary "Stationary Solver 1" | stol = 1.0E-4
      p1: Parametric | porder = constant
      fc1: FullyCoupled | linsolver = d1; initstep = 0.1; minsteprecovery = 0.001; maxiter = 50
      d1: Direct

Datasets
  dset1: Solution | solution = sol1

Plots
  pg1: PlotGroup1D "Energy Levels (semi)" | data = dset1; title = Energy Diagram; ylabel = Energy (eV)
    lngr1: LineGraph "Conduction Band Energy Level" on all domains | expr = semi.Ec_e; unit = eV; legends = Ec
    lngr2: LineGraph "Electron Quasi-Fermi Energy Level" on all domains | expr = semi.Efn_e; unit = eV; legends = Efn
    lngr3: LineGraph "Hole Quasi-Fermi Energy Level" on all domains | expr = semi.Efp_e; unit = eV; legends = Efp
    lngr4: LineGraph "Valence Band Energy Level" on all domains | expr = semi.Ev_e; unit = eV; legends = Ev
  pg2: PlotGroup1D "Carrier Concentrations (semi)" | data = dset1; ylabel = Carrier concentration (1/cm^3)
    lngr1: LineGraph "Electron Concentration" on domains 1, 2 | expr = semi.N; unit = 1/cm^3; legends = electrons
    lngr2: LineGraph "Hole Concentration" on domains 1, 2 | expr = semi.P; unit = 1/cm^3; legends = holes
  pg3: PlotGroup1D "Electric Potential (semi)" | data = dset1; ylabel = Electric Potential (V)
    lngr1: LineGraph on domains 1, 2 | expr = V
  pg4: PlotGroup1D "Net Dopant Concentration (semi)"
    data = dset1
    ylabel = Net Dopant Concentration \vert N<sub>d</sub> - N<sub>a</sub>\vert, 1/cm<sup>3</sup>
    lngr1: LineGraph "P-type" on all domains | expr = semi.Nnetdop; unit = 1/cm^3; xdataexpr = X; legends = P-type (Red)
      filt1: LineGraphFilter "Filter 1" | expr = semi.Na-semi.Nd > 1[1/cm^3]
    lngr2: LineGraph "N-type" on all domains | expr = semi.Nnetdop; unit = 1/cm^3; xdataexpr = X; legends = N-type (Blue)
      filt1: LineGraphFilter "Filter 1" | expr = semi.Nd-semi.Na > 1[1/cm^3]

Exports
  data1: Data | data = dset1; expr = semi.Ec_e; filename = C:\Users\bobyc\Downloads\Untitled.txt